// SBML level 3 version 1

model __main()

  // Compartments:
  compartment default_compartment = 1;

  // Species:
  species l1 in default_compartment = 0;
  species l13 in default_compartment = 0;
  species l15 in default_compartment = 0;
  species l135 in default_compartment = 0;
  species c in default_compartment = 0;
  species s in default_compartment = 0;
  species cs in default_compartment = 0;
  species l2 in default_compartment = 0;
  species sa in default_compartment = 0;
  species sb in default_compartment = 0;

  // Parameters:
  k1 = 2.4;
  kd1 = 0.222;
  kt3 = 500.5;
  kt5 = 500.5;
  k2 = 17.7;
  kd2 = 0.056;
  lk1 = 80;
  lkd1 = 0.222;
  kc = 100;
  kd = 1;
  k3 = 1.125;

  // Reactions:
  r1: -> l1; k1;
  r2: l1 -> ; l1*kd1;
  r3: l1 -> l13; kt3*l1;
  r4: l1 -> l15; kt5*l1;
  r5: l13 -> ; kd1*l13;
  r6: l15 -> ; kd1*l15;
  r7: l15 -> l135; kt3*l15;
  r8: l13 -> l135; kt5*l13;
  r9: l135 -> ; l135*kd1;
  r10: l135 -> c; k2*l135;
  r11: c -> ; kd2*c;
  r12: -> s; lk1;
  r13: s -> ; lkd1*s;
  r14: c + s -> cs; kc*c*s;
  r15: cs -> c + s; kd*cs;
  r16: cs -> l2 + sa + sb; k3*cs;
  r17: l2 -> ; lkd1*l2;
  r18: sa -> ; lkd1*sa;
  r19: sb -> ; lkd1*sb;
end
